<?xml version="1.0"?>
<?xml-stylesheet type="text/xsl" href="http://jsbsim.sourceforge.net/JSBSim.xsl"?>

<!-- Copyright (c) 2018 Joshua Davidson (it0uchpods) -->

<fdm_config name="727-200" version="2.0" release="ALPHA"
xmlns:xsi="http://www.w3.org/2001/XMLSchema-instance"
xsi:noNamespaceSchemaLocation="http://jsbsim.sourceforge.net/JSBSim.xsd">

	<fileheader>
		<author>Joshua Davidson (it0uchpods)</author>
		<version>Pre V1.0</version>
		<description>Boeing 727-2XX FDE</description>
	</fileheader>

	<metrics file="Systems/b722-metrics"/>
	<mass_balance file="Systems/b722-mass-balance"/>
	<ground_reactions file="Systems/b722-ground-reactions"/>

	<propulsion>
		<engine file="JT8D-17R_1">
			<location unit="M">
				<x> 9.35115 </x>
				<y> -2.9448 </y>
				<z> -0.32935 </z>
			</location>
			<orient unit="DEG">
				<roll> 0.0 </roll>
				<pitch> 2.2 </pitch>
				<yaw> 1 </yaw>
			</orient>
			<feed>0</feed>
			<thruster file="direct">
				<location unit="M">
					<x> 9.35115 </x>
					<y> -2.9448 </y>
					<z> -0.32935 </z>
				</location>
				<orient unit="DEG">
					<roll> 0.0 </roll>
					<pitch> 2.2 </pitch>
					<yaw> 1 </yaw>
				</orient>
			</thruster>
		</engine>

		<engine file="JT8D-17R_2">
			<location unit="M">
				<x> 16.8476 </x>
				<y> 0 </y>
				<z> -0.32935 </z>
			</location>
			<orient unit="DEG">
				<roll> 0.0 </roll>
				<pitch> 1.6 </pitch>
				<yaw> 0 </yaw>
			</orient>
			<feed>1</feed>
			<thruster file="direct">
				<location unit="M">
					<x> 16.8476 </x>
					<y> 0 </y>
					<z> -0.32935 </z>
				</location>
				<orient unit="DEG">
					<roll> 0.0 </roll>
					<pitch> 1.6 </pitch>
					<yaw> 0 </yaw>
				</orient>
			</thruster>
		</engine>

		<engine file="JT8D-17R_3">
			<location unit="M">
				<x> 9.35115 </x>
				<y> 2.9448 </y>
				<z> -0.32935 </z>
			</location>
			<orient unit="DEG">
				<roll> 0.0 </roll>
				<pitch> 2.2 </pitch>
				<yaw> -1 </yaw>
			</orient>
			<feed>2</feed>
			<thruster file="direct">
				<location unit="M">
					<x> 9.35115 </x>
					<y> 2.9448 </y>
					<z> -0.32935 </z>
				</location>
				<orient unit="DEG">
					<roll> 0.0 </roll>
					<pitch> 2.2 </pitch>
					<yaw> -1 </yaw>
				</orient>
			</thruster>
		</engine>

		<tank type="FUEL" number="0"> <!-- Left Wing -->
			<location unit="M">
				<x> -0.36876 </x>
				<y> -5.1783 </y>
				<z> 0.32935 </z>
			</location>
			<priority>2</priority>
			<capacity unit="LBS"> 13230 </capacity>
			<contents unit="LBS">  8000 </contents>
		</tank>

		<tank type="FUEL" number="1"> <!-- Center -->
			<location unit="M">
				<x> -0.36876 </x>
				<y> 0 </y>
				<z> 0.32935 </z>
			</location>
			<priority>1</priority>
			<capacity unit="LBS"> 30233 </capacity>
			<contents unit="LBS">  8000 </contents>
		</tank>

		<tank type="FUEL" number="2"> <!-- Right Wing -->
			<location unit="M">
				<x> -0.36876 </x>
				<y> 5.1783 </y>
				<z> 0.32935 </z>
			</location>
			<priority>2</priority>
			<capacity unit="LBS"> 13230 </capacity>
			<contents unit="LBS">  8000 </contents>
		</tank>
	</propulsion>

	<system file="b722-fcs"/>
	<system file="b722-spoilers"/>

	<flight_control name="none"/>

	<aerodynamics file="Systems/b722-aerodynamics.xml"/>
	<external_reactions file="Systems/b722-external-reactions"/>

</fdm_config>
